# OpenSim document version 30000
Model:
  ForceSet:
    Thelen2003Muscle [values shared by the 48 below unless stated]: max_isometric_force=1000 stiffness=100000
        dissipation=1
    Thelen2003Muscle muscle0: optimal_fiber_length=17.7116 tendon_slack_length=0.03614613
      PathPoint muscle0_node0: torso (0.2223211 0.1612125 -0.02663915)
      PathPoint muscle0_node2: upper_arm_left (0.012554 0.1105853 -0.004845314)
    Thelen2003Muscle muscle1: optimal_fiber_length=14.59417 tendon_slack_length=0.002978403
      PathPoint muscle1_node0: torso (0.2200027 0.1072955 0.006752017)
      PathPoint muscle1_node2: upper_arm_left (-0.004141837 0.09058533 -0.002347485)
    Thelen2003Muscle muscle2: optimal_fiber_length=10.9259 tendon_slack_length=0.02229775
      PathPoint muscle2_node0: torso (0.2133347 0.0638123 0.01046355)
      PathPoint muscle2_node2: upper_arm_left (-0.004141837 0.09058533 -0.002347485)
    Thelen2003Muscle muscle3: optimal_fiber_length=8.088837 tendon_slack_length=0.01650783
      PathPoint muscle3_node0: torso (0.2120802 0.008462249 0.005685556)
      PathPoint muscle3_node2: upper_arm_left (-0.03423198 0.1095853 0.01615476)
    Thelen2003Muscle muscle4: optimal_fiber_length=26.37339 tendon_slack_length=0.05382325
      PathPoint muscle4_node0: torso (0.2129902 -0.03687692 -0.009297056)
      PathPoint muscle4_node3: upper_arm_left (0.005563941 0.1105853 0.01702583)
    Thelen2003Muscle muscle5: optimal_fiber_length=14.59576 tendon_slack_length=0.02978726
      PathPoint muscle5_node0: torso (0.2199925 0.1116581 -0.06191343)
      PathPoint muscle5_node2: upper_arm_left (-0.004141837 0.09058533 -0.002347485)
    Thelen2003Muscle muscle6: optimal_fiber_length=11.11566 tendon_slack_length=0.02268503
      PathPoint muscle6_node0: torso (0.2142261 0.05777778 -0.06640408)
      PathPoint muscle6_node2: upper_arm_left (-0.004141837 0.09058533 -0.002347485)
    Thelen2003Muscle muscle7: optimal_fiber_length=8.872712 tendon_slack_length=0.01810758
      PathPoint muscle7_node0: torso (0.2099875 0.01321943 -0.07118207)
      PathPoint muscle7_node2: upper_arm_left (-0.03125183 0.1105853 -0.02471233)
    Thelen2003Muscle muscle8: optimal_fiber_length=26.58511 tendon_slack_length=0.05425532
      PathPoint muscle8_node0: torso (0.2128766 -0.03268092 -0.08013072)
      PathPoint muscle8_node3: upper_arm_left (0.002031478 0.1105853 -0.02525326)
    Thelen2003Muscle muscle9: optimal_fiber_length=10.60843 tendon_slack_length=0.02164986
      PathPoint muscle9_node0: upper_arm_left (-0.01938118 -0.06083288 0.03757058)
      PathPoint muscle9_node1: upper_arm_left (-0.02223116 -0.1690112 0.03488174)
    Thelen2003Muscle muscle10: optimal_fiber_length=9.292046 tendon_slack_length=0.01896336
      PathPoint muscle10_node0: upper_arm_left (-0.01545586 -0.06192264 -0.03622195)
      PathPoint muscle10_node1: upper_arm_left (-0.02404183 -0.1563193 -0.03862653)
    Thelen2003Muscle muscle11: optimal_fiber_length=19.23342 tendon_slack_length=0.03925188
      PathPoint muscle11_node0: upper_arm_left (0.02063316 -0.06493288 0.01352751)
      PathPoint muscle11_node3: forearm_left (-0.03184456 0.1345 0.01568993)
    Thelen2003Muscle muscle12: optimal_fiber_length=21.28799 tendon_slack_length=0.04344488
      PathPoint muscle12_node0: upper_arm_left (0.02063316 -0.06293288 -0.01822249)
      PathPoint muscle12_node3: forearm_left (-0.03184456 0.1345 -0.01568993)
    Thelen2003Muscle muscle18: optimal_fiber_length=12.78542 tendon_slack_length=0.02609269
      PathPoint muscle18_node0: upper_arm_right (0.001857231 -0.04650768 -0.03386702)
      PathPoint muscle18_node2: elbow_right (5.23908e-12 -0.0175005 -4.999988e-7)
    Thelen2003Muscle muscle19: optimal_fiber_length=12.22748 tendon_slack_length=0.02495405
      PathPoint muscle19_node0: upper_arm_right (0.002476672 -0.04651821 0.03499136)
      PathPoint muscle19_node1: elbow_right (0 -0.013 -8.673617e-20)
    Thelen2003Muscle muscle20: optimal_fiber_length=21.0007 tendon_slack_length=0.04285856
      PathPoint muscle20_node0: upper_arm_right (-0.037975 -0.05051821 -0.015875)
      PathPoint muscle20_node3: forearm_right (0.03184456 0.1345 -0.01568993)
    Thelen2003Muscle muscle21: optimal_fiber_length=16.62111 tendon_slack_length=0.03392062
      PathPoint muscle21_node0: upper_arm_right (-0.037975 -0.05051821 0.015875)
      PathPoint muscle21_node3: forearm_right (3.78364e-14 0.13085 1.502704e-14)
    Thelen2003Muscle muscle22: optimal_fiber_length=5.080422 tendon_slack_length=0.01036821
      PathPoint muscle22_node0: torso (-0.0370657 0.2334073 -0.001380975)
      PathPoint muscle22_node1: head (-0.02284242 -0.1238063 0.1485494)
    Thelen2003Muscle muscle23: optimal_fiber_length=4.907523 tendon_slack_length=0.01001535
      PathPoint muscle23_node0: torso (0.04005244 0.2436966 0.0006731717)
      PathPoint muscle23_node1: head (-0.02284242 -0.1138063 0.1485494)
    Thelen2003Muscle muscle24: optimal_fiber_length=4.568061 tendon_slack_length=0.009322574
      PathPoint muscle24_node0: torso (-0.03043538 0.2378606 -0.06622473)
      PathPoint muscle24_node1: head (-0.03784242 -0.1141579 0.06016863)
    Thelen2003Muscle muscle25: optimal_fiber_length=3.148739 tendon_slack_length=0.006425998
      PathPoint muscle25_node0: torso (0.03533344 0.2378606 -0.06622473)
      PathPoint muscle25_node1: head (-0.004493501 -0.1248987 0.07228225)
    Thelen2003Muscle muscle26: optimal_fiber_length=49.91067 tendon_slack_length=1.018585
      PathPoint muscle26_node0: torso (0.06875874 -0.1404335 0.006839507)
      PathPoint muscle26_node2: pelvis (-0.1896831 0.09309301 0.1126238)
    Thelen2003Muscle muscle27: optimal_fiber_length=50.00388 tendon_slack_length=1.020487
      PathPoint muscle27_node0: torso (-0.06375874 -0.1404335 0.006839507)
      PathPoint muscle27_node2: pelvis (0.2003169 0.09229301 0.1126238)
    Thelen2003Muscle muscle28: optimal_fiber_length=33.54621 tendon_slack_length=0.06846165
      PathPoint muscle28_node0: torso (0.06875874 -0.1404335 -0.02816049)
      PathPoint muscle28_node2: pelvis (0.2303169 0.09229301 -0.002376165)
    Thelen2003Muscle muscle29: optimal_fiber_length=44.98777 tendon_slack_length=0.09181178
      PathPoint muscle29_node0: torso (0.07375874 -0.1404335 -0.06316049)
      PathPoint muscle29_node2: pelvis (-0.1896831 0.09309301 -0.1173762)
    Thelen2003Muscle muscle30: optimal_fiber_length=45.26971 tendon_slack_length=0.09238717
      PathPoint muscle30_node0: torso (-0.06375874 -0.1404335 -0.06316049)
      PathPoint muscle30_node2: pelvis (0.2003169 0.09229301 -0.1173762)
    Thelen2003Muscle muscle31: optimal_fiber_length=34.07033 tendon_slack_length=0.06953128
      PathPoint muscle31_node0: torso (-0.06375874 -0.1404335 -0.02816049)
      PathPoint muscle31_node2: pelvis (-0.2196831 0.09309301 -0.002376165)
    Thelen2003Muscle muscle33: optimal_fiber_length=15.7534 tendon_slack_length=0.0321498
      PathPoint muscle33_node0: pelvis (-0.1719331 -0.05290699 0.0486401)
      PathPoint muscle33_node1: thigh_right (0.03811228 0.06067892 0.03853454)
    Thelen2003Muscle muscle34: optimal_fiber_length=14.76865 tendon_slack_length=0.0301401
      PathPoint muscle34_node0: pelvis (-0.1656654 -0.05290699 -0.05038135)
      PathPoint muscle34_node2: thigh_right (0.03811228 0.0746813 -0.0198087)
    Thelen2003Muscle muscle35: optimal_fiber_length=26.02309 tendon_slack_length=0.05310836
      PathPoint muscle35_node0: thigh_right (0.03410964 -0.03663015 0.02112948)
      PathPoint muscle35_node2: shin_right (0.03411228 0.06067892 0.03853454)
    Thelen2003Muscle muscle36: optimal_fiber_length=24.22 tendon_slack_length=0.04942858
      PathPoint muscle36_node0: thigh_right (0.03665746 -0.01821737 -0.04805349)
      PathPoint muscle36_node1: shin_right (0.03611228 0.07565368 -0.01957532)
    Thelen2003Muscle muscle37: optimal_fiber_length=15.85733 tendon_slack_length=0.0323619
      PathPoint muscle37_node0: shin_right (0.03875826 -0.03481312 0.02505894)
      PathPoint muscle37_node1: foot_right (-3.552714e-17 0.006223279 0.04691954)
    Thelen2003Muscle muscle38: optimal_fiber_length=17.71122 tendon_slack_length=0.03614535
      PathPoint muscle38_node0: shin_right (0.03856271 -0.01714775 -0.04779678)
      PathPoint muscle38_node1: foot_right (1.421085e-16 0.01349674 -0.08194123)
    Thelen2003Muscle muscle39: optimal_fiber_length=14.73813 tendon_slack_length=0.03007782
      PathPoint muscle39_node0: pelvis (0.1765902 -0.05290699 0.04199346)
      PathPoint muscle39_node1: thigh_left (-0.018 0.012 -2.501564e-5)
    Thelen2003Muscle muscle40: optimal_fiber_length=15.98803 tendon_slack_length=0.03262862
      PathPoint muscle40_node0: pelvis (0.1775602 -0.05262726 -0.06372687)
      PathPoint muscle40_node2: thigh_left (-0.02 0.012 -0.06002502)
    Thelen2003Muscle muscle41: optimal_fiber_length=26.35116 tendon_slack_length=0.05377787
      PathPoint muscle41_node0: thigh_left (-0.01439881 -0.07951005 0.01683588)
      PathPoint muscle41_node2: shin_left (-0.03611228 0.06799633 0.02330968)
    Thelen2003Muscle muscle42: optimal_fiber_length=22.40663 tendon_slack_length=0.04572782
      PathPoint muscle42_node0: thigh_left (-0.02599719 -0.09403955 -0.07371169)
      PathPoint muscle42_node1: shin_left (-0.02878415 0.07874077 -0.05496262)
    Thelen2003Muscle muscle43: optimal_fiber_length=15.97626 tendon_slack_length=0.03260462
      PathPoint muscle43_node0: shin_left (-0.03793609 -0.02817894 0.02714734)
      PathPoint muscle43_node1: foot_left (0 0.01 0.045)
    Thelen2003Muscle muscle44: optimal_fiber_length=16.49775 tendon_slack_length=0.03366889
      PathPoint muscle44_node0: shin_left (-0.03798634 -0.02843786 -0.04052798)
      PathPoint muscle44_node1: foot_left (-3.552714e-17 -0.001 -0.082)
    Thelen2003Muscle muscle13: optimal_fiber_length=17.79397 tendon_slack_length=0.03631422
      PathPoint muscle13_node0: torso (-0.2173157 0.1612125 -0.02963915)
      PathPoint muscle13_node3: upper_arm_right (-0.0132 0.105 -1.406861e-17)
    Thelen2003Muscle muscle14: optimal_fiber_length=14.21292 tendon_slack_length=0.02900595
      PathPoint muscle14_node0: torso (-0.2139973 0.1071721 -0.06388165)
      PathPoint muscle14_node2: upper_arm_right (-0.0132 0.105 -2.561753e-17)
    Thelen2003Muscle muscle15: optimal_fiber_length=10.40209 tendon_slack_length=0.02122876
      PathPoint muscle15_node0: torso (-0.2082134 0.05775364 -0.06555279)
      PathPoint muscle15_node2: upper_arm_right (-0.0132 0.105 -2.561753e-17)
    Thelen2003Muscle muscle16: optimal_fiber_length=8.822606 tendon_slack_length=0.01800532
      PathPoint muscle16_node0: torso (-0.2060991 0.008243243 -0.0763647)
      PathPoint muscle16_node2: upper_arm_right (0.01680803 0.124 -0.02)
    Thelen2003Muscle muscle17: optimal_fiber_length=27.30038 tendon_slack_length=0.05571505
      PathPoint muscle17_node0: torso (-0.2082492 -0.03784132 -0.08098205)
      PathPoint muscle17_node3: upper_arm_right (-0.0212132 0.124 -0.0212132)
    Thelen2003Muscle muscle45: optimal_fiber_length=26.85296 tendon_slack_length=0.05480195
      PathPoint muscle45_node0: torso (-0.2082492 -0.03784132 -0.009297056)
      PathPoint muscle45_node3: upper_arm_right (-0.0212132 0.124 0.0212132)
    Thelen2003Muscle muscle46: optimal_fiber_length=8.338141 tendon_slack_length=0.01701661
      PathPoint muscle46_node0: torso (-0.205902 0.009121394 0.0005029266)
      PathPoint muscle46_node2: upper_arm_right (0.01680803 0.124 0.02)
    Thelen2003Muscle muscle47: optimal_fiber_length=10.36655 tendon_slack_length=0.02115623
      PathPoint muscle47_node0: torso (-0.208363 0.05674131 0.01046355)
      PathPoint muscle47_node2: upper_arm_right (-0.0132 0.105 -2.561753e-17)
    Thelen2003Muscle muscle48: optimal_fiber_length=14.21274 tendon_slack_length=0.0290056
      PathPoint muscle48_node0: torso (-0.2139973 0.1071721 0.007603347)
      PathPoint muscle48_node2: upper_arm_right (-0.0132 0.105 -2.561753e-17)
